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f(x) := x^3 + x - 1
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z := 0
xk := root(f(z), z)
xk = 0.682328
b := 1
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a := 0
f(b) = 1
f(a) = -1
f(a)*f(b) = -1
x0 := (a + b)/2 = 0.5
f(x0) = -0.375
f(b) = 1
f(a) = -1
# 1 приближение
b = 1
a := x0 = 0.5
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x1 := (a + b)/2 = 0.75
|b - a| = 0.5
# Погрешность > 0.01
f(a) = -0.375
f(x1) = 0.171875
f(b) = 1
