i := 0 .. 3
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i = [0; 1; 2; 3]
x[i] := 0, 2, 3, 5
y[i] := -1, -4, 2, -8
L(x) := -1*((x - 2)*(x - 3)*(x - 5))/((0 - 2)*(0 - 3)*(0 - 5)) - 4*(x - 0)*(x - 3)*(x - 5)/((2 - 0)*(2 - 3)*(2 - 5)) + 2*(x - 0)*(x - 2)*(x - 5)/((3 - 2)*(3 + 0)*(3 - 5)) - 8*(x - 0)*(x - 3)*(x - 2)/((5 - 0)*(5 - 3)*(5 - 2)) simplify → 26*x^2/3 - 37*x^3/30 - 139*x/10 - 1
L(1.15) = -7.39908
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